<Lems xmlns="http://www.neuroml.org/lems/0.7.4"
      xmlns:xsi="http://www.w3.org/2001/XMLSchema-instance"
      xsi:schemaLocation="http://www.neuroml.org/lems/0.7.4 ../../LEMS/Schemas/LEMS/LEMS_v0.7.4.xsd"
      description="Glomerular gap junctions">

    <ComponentType name="glomerularGapJunction"
                   extends="baseSynapse"
                   description="de Gruijl et al. 2016">

        <Property name="weight" dimension="none" defaultValue="1"/>
        <Parameter name="conductance" dimension="conductance"/>
        <Exposure name="i" dimension="current"/>
        <Requirement name="v" dimension="voltage"/>
        <InstanceRequirement name="peer" type="gapJunction"/>

        <Dynamics>
            <DerivedVariable name="vpeer" dimension="voltage" select="peer/v"/>
            <DerivedVariable name="i" exposure="i"  value="weight * conductance * (vpeer - v)"/>
        </Dynamics>
    </ComponentType>

</Lems>
